cr := 27
vmax := (cr - 44.9999)*(999999 - 5)/(45 - 44.9999) + 5
vmax = -1.79998e11
vmin := (cr - 44.9999)*(-99999 - (-99999))/(45 - 44.9999) + (-99999)
vmin = -99999
cr := 25
vmax := (cr - 29.9999)*(999999 - 25)/(30 - 29.9999) + 25
vmax = -4.99977e10
vmin := (cr - 29.9999)*(-99999 - (-99999))/(30 - 29.9999) + (-99999)
vmin = -99999
